# AguaClara Water Treatment Plants
# Automated Design
# Add variable descriptions next to every varible so it is easy to interpret what this all means.
# Design References
# [reference: BasicInputs.xmcd]
# Use BasicClientInputs and ExpertClientInputs when this is run by LabVIEW.
# Use BasicInputs and ExpertInputs to use the program in MathCAD
# Change the reference by
# - right clicking
# - select properties
# - reference tab
# - type in the correct file name
# [reference: ExpertInputs.xmcd]
B_SedPlateFramePipes = 0.3 m
# [reference: DesignAssumptions.xmcd]
# [reference: MathFunctions.xmcd]
# [reference: PipeDatabase.xmcd]
Q_Plant = 22 L/s
# [reference: MinorLossCoefficients.xmcd]
# [reference: FluidsFunctions.xmcd]
# [reference: Sedimentation Tank.xmcd]
# [reference: Floc Hopper - New Design.xmcd]
# [reference: Flocculator.xmcd]
# [reference: Rapid Mix.xmcd]
# [reference: EntranceTankDim.xmcd]
# [reference: Materials List.xmcd]
# [reference: Chemical Doser_app37.xmcd]
# [reference: ChemStorageCylinders.xmcd]
W_SedBay = 1.06 m
N_SedTanks = 1
W_ExitChannelMin = 0.4064 m
W_SedBay = 1.06 m
N_SedBays = 2
# Sed Tanks and Slopes:
Geom_ExitChannel = 1
N_SedTanks = 1
H_SedBetween = 18.4958 cm  # Distance from the top of the inlet manifold to the bottom of the ledge supporting the lamella frame
L_Sed = 13.2798 m
N_SedBays = 2  # Number of bays of inlet manifolds in each sed tank
# Length of the port through which water exits the inlet manifold
# Width of ferrous cement plates in whice one manifold port is cut
Q_SedBay = 11 L/s
# Sedimentation Tank Sludge Drain:
N_SedSludgeOrifices = 132  # per cell
Ti_SludgeDrain = 30 min  # Tank Drain time
W_SedSludge = 19.5758 cm  # Width of the sludge channel
B_SedSludgeOrifices = 10 cm  # Distance center to center between drain orifices
H_SedSludge = 9.78788 cm  # Depth of the sludge channel
T_SedSludge = 5 cm
T_SedSludge = 5 cm
# Thickness of the plate topping the sludge channel
# through which drain holes are formed
W_SedDrainCover = 29.5758 cm
D_SedSludgeOrifice = 0.011 m  # Diameter of drain orifices
W_SedInletBottom = 0.382121 m
N_SedSludgeOrifices = 132
ND_SedSludgeValve = 4 in
# Sedimentation Tank Dimensions:
Z_SedSludge = 0.147879 m  # Height from 0 of the top of the sludge drain
Z_SedSlopes = 0.766431 m  # Height from 0 of the top of the inlet manifold
W_Sed = 2.12 m  # Total tank wall height
L_Sed = 13.2798 m  # Total tank length
# Inlet Channel:
HW_InletChannel = 0.35289 m  # Width of the drop chimneys connecting channel to sed inlet manifolds
W_InletChannel = 0.622758 m  # length of drop chimmneys
L_Channel = 2.42 m
N_SedInletPipes = 2  # per sed bay
H_InletChannel = 0.45289 m
# Sedimentation Tank Effluent Launder:
N_SedLaunderOrifices = 218  # Number of orifices per launder
Q_SedLaunderOrifices = 5.05887e-5 m^3/s  # More Launder Dimensions
ND_SedLaunder = 8 in
B_SedLaunderOrifices = 0.106906 m  # Center to center launder spacing
L_SedLaunder = 11.7704 m
# Exit Channel:
D_SedLaunderOrifice = 0.433071 in
W_ExitChannel = 0.586623 m
H_ExitChannel = 0.45289 m
L_ExitChannel = 2.42 m
H_PltWeir = 0.36289 m  # height of the weir carrying water to the distribution tank
HW_ExitChannel = 0.31289 m  # water height in exit channel from 0
# Lamella:
L_SedPlate = 0.45725 m
B_SedPlate = 2.9594 cm  # center to center distance between lamella
S_SedPlate = 2.7594 cm  # spacing between lamella
N_SedPlates = 341  # Number of Sed Plates per Sedimentation Tank Bay.
AN_SedPlate = 60 deg
V_SedC = 10.0939 m/day
L_SedActive = 11.6527 m
T
V_SedUp = 67.5165 m/day
Z_SedLaunder = 1.59518 m
H_SedPlate = 0.39599 m
H_SedAbove = 0.255477 m  # Height of water needed above the lamella
N_SedPlates = 341
HW_Sed = 1.74112 m
H_Sed = 1.84112 m
Z_Mp = 1.38823 m
H_SedBayDivider = 0.951389 m
# Sedimentation Tank Floc Hopper:
# Length of the hopper cement plate
L_FlocHopperOffset = 0.228625 m  # distance from the edge of the channel to the bottom of the first lamella (collection distance)
# width of the hopper set within each bay
# Flow Controller:
N_Fcm =  # error: This variable is undefined.
ID_FcmTube =  # error
ID_FcmTube =  # error
L_FcmTube =  # error
Q_FcmTubeMax =  # error
HL_FcmValve =  # error
# Flocculator: | Look at Flocculator Positioning arrays
W_FlocChannel = 0.53 m
# Fill last channel with bafffles from last channel
# Fix port width to be based on energy dissipation in that channel
ED_Floc = 6 mW/kg
# Adjust spacing after the number of baffles per channel is known.
# Check the residence time of the flocculator should be at least 20minutes
HW_FlocEnd = 1.74112 m
X_FlocBaffles = [
    0.282835, 0.46862;
    0.547671, 0.735137;
    0.812506, 1.00165;
    1.07734, 1.26817;
    1.34218, 1.53469;
    1.60701, 1.80121;
    1.87185, 2.06772;
    2.13668, 2.33424;
    2.40152, 2.60076;
    2.66635, 2.86728
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] m
L_FlocBaffles = [
    1.47828, 1.77849;
    1.77849, 1.47828;
    1.47828, 1.77849;
    1.77849, 1.47828;
    1.47828, 1.77849;
    1.77849, 1.47828;
    1.47828, 1.77849;
    1.77849, 1.47828;
    1.47828, 1.77849;
    1.77849, 1.47828
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] m
Z_FlocBaffles = [
    0, 0.264517;
    0.262835, 0;
    0, 0.264517;
    0.262835, 0;
    0, 0.264517;
    0.262835, 0;
    0, 0.264517;
    0.262835, 0;
    0, 0.264517;
    0.262835, 0
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] m
N_FlocChannels = 2
L_FlocTank = 26.5595 m
HL_Floc = 25.0211 cm
HW_FlocStart = 1.99133 m
S_FlocBaffle = [26.2835; 26.4517] cm
B_FlocBaffle = [26.4835; 26.6517] cm
N_FlocChannelBaffles = [49; 48]
W_FlocPort = [0.262835; 0.269056] m
HL_FlocChannels = [12.7167; 12.3044] cm
L_FlocBaffleLower = 1.47828 m
L_FlocBaffleUpper = 1.77849 m
H_FlocPort = [0.53; 0.521058] m
Ti_Floc = 18.5674 min  # residence time of the flocculator
N_FlocBaffles = 97
# Rapid Mix Unit and Entrance Tank:
L_Et = 1.65831 m
W_Et = 1.65831 m
H_Et = 1.10307 m  # Height of Entrance Tank Orifice
W_EtOrifice[30] =  # error
L_trueET[30] =  # error  # Length of Entrance Tank Orifice
Pi_EtFlow[30] =  # error: This value must be a vector.  # Ratio of the minimum flow divided by the maximum flow through the plant.
L_FlocEntryOrifice =  # error  # Length of orifice entering into flocculator from Rapid Mix Unit
W_FlocEntryOrifice =  # error  # Height of orifice entering into flocculator
ED_Diffusion =  # error  # Minimum Energy Dissipation needed
HL_FlocEntryOrifice =  # error  # Head loss caused by entering flocculation tank.
A_FlocEntry =  # error
A_EtOrifice =  # error
HW_EtTotal =  # error  # Total Height of water at beginning of rapid mix unit
HW_Channel2 =  # error  # Height of water at the back of the entrance tank channel (from channel bottom)
HW_EtChannel =  # error  # Height of Waterfall into flocculator
W_EtChannel =  # error  # Widt of entrance tank channel
Vol_Stock =  # error  # Volume of chemical stock tanks
ZW_ExitChannel =  # error  # Water Level at the end of the plant in the exit channel and exit channel box
HW_Sed = 1.74112 m
HW_FlocStart = 1.99133 m  # Water level at the beginning of the floc tank
HL_Floc = 25.0211 cm  # just for ref. the head loss throught the floc tank
HW_EtTotal =  # error  # Height of the water in the entrance channel
# Materials List:
N_Launders = 2
L_LaunderPipeTotal = 23.5408 m
N_Valves = 2
N_LaunderCouplings = 2
N_ValveCouplings = 2
N_SedPlatesTotal = 682
N_SedPlatesPerSheet = 8
N_SedPlateSheets = 86
# [reference: AutoCADMasterProgram.xmcd]
# AutoCAD References
AC_SedTank =  # no stored result
AC_EntranceTank = [
    "-layer m EntranceTank"; "c t 214,214,214"; "EntranceTank"; "  "; "_-view o t _zoom w 3.11831,3.47,1.07745 1.14,5.44831,2.18052 _box 2.95831,3.63,1.07745 1.3,5.28831,2.18052 _box 3.10831,3.48,0.92745 1.15,5.43831,2.18052 _subtract 3.10831,3.48,0.92745  2.95831,3.63,1.07745 "; "-group c EntranceTank y "; "all "; "-layer s 0"; "  "; "-layer f EntranceTank"
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]
AC_FlocTank = [
    "-layer m FlocTank"; "c t 132,132,132"; "FlocTank"; "  "; "_-view o t _zoom w 0.16,2.11,0 -13.43977,3.64,2.09133 _box 0,2.27,0 -13.27977,3.48,2.09133 _box 0.15,2.12,-0.15 -13.42977,3.63,2.09133 _subtract 0.15,2.12,-0.15  0,2.27,0 "; "_box -13.42977,2.8,0 0.15,2.95,2.09133"; "-group c FlocTank y "; "all "; "-layer s 0"; "  "
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]
